<?xml version="1.0"?>
<!--
  File:     engIO540AB1A5.xml
  Author:   Aero-Matic v 0.8

  Inputs:
    name:           engIO540AB1A5
    type:           piston
    power:          230.0 hp
    augmented?      no
    injected?       no
-->

<piston_engine name="IO540AB1A5">
    <air-intake-impedance-factor>0.18</air-intake-impedance-factor>
    <ram-air-factor>0.1</ram-air-factor>
    <minmp unit="INHG">         15.0 </minmp>
    <maxmp unit="INHG">         29 </maxmp>
    <displacement unit="IN3">  541.5 </displacement>
    <bore unit="IN">5.125</bore>
    <stroke unit="IN">4.375</stroke>
    <static-friction>1.5</static-friction>
    <cylinders> 6 </cylinders>
    <cylinder-head-mass unit="LBS"> 21.75 </cylinder-head-mass>  <!-- Part No. LW-13870 / MFR Model# 16A30080-03; 21.75lbs -->
    <compression-ratio>8.7</compression-ratio>
    <volumetric-efficiency>0.88</volumetric-efficiency>
    <bsfc unit="LBS/HP*HR">0.445</bsfc>
    <maxhp>        230.0 </maxhp>
    <cycles>         4.0 </cycles>
    <idlerpm>      650.0 </idlerpm> <!--POH Cessna 182S Page: 4-23-->
    <maxrpm>      2400 </maxrpm>
    <maxthrottle>    1.0 </maxthrottle>
    <minthrottle>    0.0 </minthrottle>
    <sparkfaildrop>  0.15 </sparkfaildrop>

    <oil-pressure-relief-valve-psi> 67 </oil-pressure-relief-valve-psi> <!-- lycoming manual states: min=55; max=95; idle=25; start&warm-up=115 -->
    <oil-pressure-rpm-max>          1000  </oil-pressure-rpm-max>
    <design-oil-temp-degK>           358  </design-oil-temp-degK>     <!-- level cruise: between 165degF and 200 degF -->
    <!--<oil-viscosity-index>              0.25 </oil-viscosity-index> --> <!-- TODO: .25 default jsbsim value, but simulated in engine.xml -->
</piston_engine>
